New XYCurve.MyPvsT npts=4 xarray=[0, 25, 75, 100] yarray=[1.2, 1.0, 0.8, 0.6]

New XYCurve.MyEff npts=4 xarray=[0.1, 0.2, 0.4, 1.0] yarray=[0.86, 0.90, 0.93, 0.97]

New Tshape.MyTemp npts=288 mInterval=5 temp=[25.0, 25.0, 25.0, 25.0, 25.0, 25.0, 25.0, 25.0, 25.0, 25.0, 25.0, 25.0, 25.0, 25.0, 25.0, 25.0, 25.0, 25.0, 25.0, 25.0, 25.0, 25.0, 25.0, 25.0]
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
! New Tshape.Mytemp npts=24 interval=1 temp=[25, 25, 25, 25, 25, 25, 25, 25, 35, 40, 45, 50, 60, 60, 55, 40, 35, 30, 25, 25, 25, 25, 25, 25]

New PVSystem.PV1 phases=3 Bus1=97 kV=4.16 kVA=1000 irrad=0.8 Pmpp=1000
~ temperature=25 PF=1 EffCurve=MyEff P-TCurve=MyPvsT
~ Daily=my_shape2_pv TDaily=MyTemp
~ Vminpu=0.001
~ Model=1


New PVSystem.PV2 phases=3 Bus1=450 kV=4.16 kVA=600 irrad=0.8 Pmpp=600
~ temperature=25 PF=1 EffCurve=MyEff P-TCurve=MyPvsT
~ Daily=my_shape2_pv TDaily=MyTemp
~ Vminpu=0.001
~ Model=1

New PVSystem.PV3_1 phases=1 Bus1=64.1 kV=2.4 kVA=100 irrad=0.8 Pmpp=100
~ temperature=25 PF=1 EffCurve=MyEff P-TCurve=MyPvsT
~ Daily=my_shape2_pv TDaily=MyTemp
~ Vminpu=0.001
~ Model=1

New PVSystem.PV3_2 phases=1 Bus1=64.2 kV=2.4 kVA=100 irrad=0.8 Pmpp=100
~ temperature=25 PF=1 EffCurve=MyEff P-TCurve=MyPvsT
~ Daily=my_shape2_pv TDaily=MyTemp
~ Vminpu=0.001
~ Model=1

New PVSystem.PV3_3 phases=1 Bus1=64.3 kV=2.4 kVA=100 irrad=0.8 Pmpp=100
~ temperature=25 PF=1 EffCurve=MyEff P-TCurve=MyPvsT
~ Daily=my_shape2_pv TDaily=MyTemp
~ Vminpu=0.001
~ Model=1
