Clear

Compile (IEEE123Master.dss)

Batchedit RegControl..* maxtapchange=0

Redirect ieee123_shape_load_5min.dss

Redirect edit_load.dss

! Redirect edit_load_power.dss

! Set Loadmult=1.9

! Batchedit Load..* kw=kw * 1.5
! Batchedit Load..* vkar=vkar * 1.5


New EnergyMeter.Feeder Line.L115 1

New Monitor.Feeder_output_vi element=Line.L115 Terminal=1 mode=0
New Monitor.Feeder_output_pq element=Line.L115 Terminal=1 mode=1 ppolar=no

New Monitor.Line96_vi element=Line.L96 Terminal=1 mode=0

Set mode=Daily
Set stepsize=5m
Set number=288

Set MaxControlIter=30
