New XYCurve.MyPvsT npts=4 xarray=[0, 25, 75, 100] yarray=[1.2, 1.0, 0.8, 0.6]

New XYCurve.MyEff npts=4 xarray=[0.1, 0.2, 0.4, 1.0] yarray=[0.86, 0.90, 0.93, 0.97]

New PVSystem.PV1 phases=3 Bus1=848 kV=24.9 kVA=100 irrad=1 Pmpp=100
~ temperature=25 PF=1 EffCurve=MyEff P-TCurve=MyPvsT
~ Model=1
~ Vminpu = 0 LimitCurrent=Yes
!~ SafeVoltage=0
! ~ Daily=my_shape1_pv TDaily=MyTemp
! ~ Model=2 SafeVoltage=0 LimitCurrent=No

New PVSystem.PV2 phases=3 Bus1=860 kV=24.9 kVA=100 irrad=1 Pmpp=100
~ temperature=25 PF=1 EffCurve=MyEff P-TCurve=MyPvsT
~ Model=1
~ Vminpu = 0 LimitCurrent=Yes
!~ SafeVoltage=0
! ~ Daily=my_shape1_pv TDaily=MyTemp
! ~ Model=2 SafeVoltage=0 LimitCurrent=No

New PVSystem.PV3 phases=1 Bus1=820.1 kV=24.9 kVA=150 irrad=1 Pmpp=150
~ temperature=25 PF=1 EffCurve=MyEff P-TCurve=MyPvsT
~ Model=1
~ Vminpu = 0 LimitCurrent=Yes
!~ SafeVoltage=0
! ~ Daily=my_shape1_pv TDaily=MyTemp
! ~ Model=2 SafeVoltage=0 LimitCurrent=No
